<?xml version="1.0" encoding="UTF-8"?>
<neuroml xmlns="http://www.neuroml.org/schema/neuroml2" xmlns:xsi="http://www.w3.org/2001/XMLSchema-instance" xsi:schemaLocation="http://www.neuroml.org/schema/neuroml2  https://raw.githubusercontent.com/NeuroML/NeuroML2/development/Schemas/NeuroML2/NeuroML_v2beta4.xsd" id="network_GranCellLayer">

    <notes>

Network structure (NeuroML 2beta4) for project: GranCellLayer saved with neuroConstruct v1.7.1 on: 14:47:41, 21-Mar-16

Cell Group: Golgis contains 4 cells
Cell Group: Grans contains 75 cells
Cell Group: Mossies contains 12 cells

Network connection: NetConn_Golgis_Grans contains 75 individual synaptic connections
Network connection: NetConn_Mossies_Grans contains 300 individual synaptic connections
Network connection: NetConn_Grans_Golgis contains 300 individual synaptic connections

    </notes>

    <include href="AMPA_GranGol.synapse.nml"/>
    <include href="GABAA.synapse.nml"/>
    <include href="Golgi_98.cell.nml"/>
    <include href="Golgi_CaHVA_CML.channel.nml"/>
    <include href="Golgi_CaPool_CML.nml"/>
    <include href="Golgi_H_CML.channel.nml"/>
    <include href="Golgi_KA_CML.channel.nml"/>
    <include href="Golgi_KCa_CML.channel.nml"/>
    <include href="Golgi_KDr_CML.channel.nml"/>
    <include href="Golgi_NaF_CML.channel.nml"/>
    <include href="GolgiPassiveCond.channel.nml"/>
    <include href="Gran_CaHVA_98.channel.nml"/>
    <include href="Gran_CaPool_98.nml"/>
    <include href="Gran_H_98.channel.nml"/>
    <include href="Gran_KA_98.channel.nml"/>
    <include href="Gran_KCa_98.channel.nml"/>
    <include href="Gran_KDr_98.channel.nml"/>
    <include href="Gran_NaF_98.channel.nml"/>
    <include href="GranPassiveCond.channel.nml"/>
    <include href="Granule_98.cell.nml"/>
    <include href="MF_AMPA.synapse.nml"/>
    <include href="MFFastLeakCond.channel.nml"/>
    <include href="MFSpikeSyn.synapse.nml"/>
    <include href="MossyFiber.cell.nml"/>
    <include href="NMDA.synapse.nml"/>
    <poissonFiringSynapse id="Input_0" averageRate="0.05 per_ms" synapse="MFSpikeSyn" spikeTarget="./MFSpikeSyn"/>

    <network id="network_GranCellLayer" type="networkWithTemperature" temperature="32.0 degC">

        <property tag="recommended_dt_ms" value="0.01"/>
        <property tag="recommended_duration_ms" value="1000"/>

        <population id="Golgis" component="Golgi_98" type="populationList" size="4">
            <instance id="0">
                <location x="0.0" y="100.0" z="0.0"/>
            </instance>
            <instance id="1">
                <location x="300.0" y="100.0" z="0.0"/>
            </instance>
            <instance id="2">
                <location x="600.0" y="100.0" z="0.0"/>
            </instance>
            <instance id="3">
                <location x="900.0" y="100.0" z="0.0"/>
            </instance>
        </population>

        <population id="Grans" component="Granule_98" type="populationList" size="75">
            <instance id="0">
                <location x="0.0" y="50.0" z="0.0"/>
            </instance>
            <instance id="1">
                <location x="12.162162" y="50.0" z="0.0"/>
            </instance>
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        </population>

        <population id="Mossies" component="MossyFiber" type="populationList" size="12">
            <instance id="0">
                <location x="0.0" y="0.0" z="0.0"/>
            </instance>
            <instance id="1">
                <location x="81.818184" y="0.0" z="0.0"/>
            </instance>
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        </population>

        <projection synapse="GABAA" id="NetConn_Golgis_Grans" presynapticPopulation="Golgis" postsynapticPopulation="Grans">
            <connectionWD id="0" preCellId="../Golgis/0/Golgi_98" postCellId="../Grans/0/Granule_98" preSegmentId="0" preFractionAlong="0.0" postSegmentId="0" postFractionAlong="0.5" delay="0.0 ms" weight="51.38689"/>
            <connectionWD id="1" preCellId="../Golgis/0/Golgi_98" postCellId="../Grans/1/Granule_98" preSegmentId="0" preFractionAlong="0.0" postSegmentId="0" postFractionAlong="0.5" delay="0.0 ms" weight="49.37062"/>
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        </projection>

        <projection synapse="MF_AMPA" id="NetConn_Mossies_Grans__MF_AMPA" presynapticPopulation="Mossies" postsynapticPopulation="Grans">
            <connectionWD id="0" preCellId="../Mossies/1/MossyFiber" postCellId="../Grans/0/Granule_98" preSegmentId="0" preFractionAlong="0.5" postSegmentId="0" postFractionAlong="0.5" delay="0.0 ms" weight="6.253408"/>
            <connectionWD id="1" preCellId="../Mossies/3/MossyFiber" postCellId="../Grans/0/Granule_98" preSegmentId="0" preFractionAlong="0.5" postSegmentId="0" postFractionAlong="0.5" delay="0.0 ms" weight="6.363858"/>
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        </projection>

        <projection synapse="NMDA" id="NetConn_Mossies_Grans__NMDA" presynapticPopulation="Mossies" postsynapticPopulation="Grans">
            <connectionWD id="0" preCellId="../Mossies/1/MossyFiber" postCellId="../Grans/0/Granule_98" preSegmentId="0" preFractionAlong="0.5" postSegmentId="0" postFractionAlong="0.5" delay="0.0 ms" weight="3.8080015"/>
            <connectionWD id="1" preCellId="../Mossies/3/MossyFiber" postCellId="../Grans/0/Granule_98" preSegmentId="0" preFractionAlong="0.5" postSegmentId="0" postFractionAlong="0.5" delay="0.0 ms" weight="4.5273647"/>
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        </projection>

        <projection synapse="AMPA_GranGol" id="NetConn_Grans_Golgis" presynapticPopulation="Grans" postsynapticPopulation="Golgis">
            <connectionWD id="0" preCellId="../Grans/0/Granule_98" postCellId="../Golgis/0/Golgi_98" preSegmentId="0" preFractionAlong="0.5" postSegmentId="0" postFractionAlong="0.5" delay="0.0 ms" weight="0.61102825"/>
            <connectionWD id="1" preCellId="../Grans/0/Granule_98" postCellId="../Golgis/1/Golgi_98" preSegmentId="0" preFractionAlong="0.5" postSegmentId="0" postFractionAlong="0.5" delay="0.0 ms" weight="0.6590168"/>
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        </projection>

        <inputList id="Input_0" component="Input_0" population="Mossies">
            <input id="0" target="../Mossies/0/MossyFiber" destination="synapses"/>
            <input id="1" target="../Mossies/1/MossyFiber" destination="synapses"/>
            <input id="2" target="../Mossies/2/MossyFiber" destination="synapses"/>
            <input id="3" target="../Mossies/3/MossyFiber" destination="synapses"/>
            <input id="4" target="../Mossies/4/MossyFiber" destination="synapses"/>
            <input id="5" target="../Mossies/5/MossyFiber" destination="synapses"/>
            <input id="6" target="../Mossies/6/MossyFiber" destination="synapses"/>
            <input id="7" target="../Mossies/7/MossyFiber" destination="synapses"/>
            <input id="8" target="../Mossies/8/MossyFiber" destination="synapses"/>
            <input id="9" target="../Mossies/9/MossyFiber" destination="synapses"/>
            <input id="10" target="../Mossies/10/MossyFiber" destination="synapses"/>
            <input id="11" target="../Mossies/11/MossyFiber" destination="synapses"/>
        </inputList>

    </network>

</neuroml>
