<?xml version="1.0" encoding="UTF-8"?>
<networkml xmlns="http://morphml.org/networkml/schema" xmlns:meta="http://morphml.org/metadata/schema" xmlns:xsi="http://www.w3.org/2001/XMLSchema-instance" xsi:schemaLocation="http://morphml.org/networkml/schema  http://www.neuroml.org/NeuroMLValidator/NeuroMLFiles/Schemata/v1.8.1/Level3/NetworkML_v1.8.1.xsd" lengthUnits="micrometer">

<meta:notes>

Network structure (NeuroML 1.x) for project: GranCellLayer saved with neuroConstruct v1.6.1 on: 18:44:30, 15-Nov-12

Cell Group: Golgis contains 4 cells
Cell Group: Grans contains 75 cells
Cell Group: Mossies contains 12 cells

Network connection: NetConn_Golgis_Grans contains 75 individual synaptic connections
Network connection: NetConn_Mossies_Grans contains 300 individual synaptic connections
Network connection: NetConn_Grans_Golgis contains 300 individual synaptic connections

</meta:notes>

<meta:properties>
    <meta:property tag="neuroConstruct_random_seed" value="-92492614"/>

    <meta:property tag="neuroConstruct_sim_config" value="Default Simulation Configuration"/>

    <meta:property tag="neuroConstruct_sim_duration" value="500.0"/>

    <meta:property tag="neuroConstruct_sim_time_step" value="0.01"/>

    <meta:property tag="neuroConstruct_temperature" value="32.0"/>
</meta:properties>

        <populations>
    <population name="Golgis" cell_type="Golgi_98">
        <meta:properties>

        </meta:properties>
        <instances size="4">
            <instance id="0">
                <location x="0.0" y="100.0" z="0.0"/>
            </instance>
            <instance id="1">
                <location x="300.0" y="100.0" z="0.0"/>
            </instance>
            <instance id="2">
                <location x="600.0" y="100.0" z="0.0"/>
            </instance>
            <instance id="3">
                <location x="900.0" y="100.0" z="0.0"/>
            </instance>
        </instances>
    </population>
    <population name="Grans" cell_type="Granule_98">
        <meta:properties>

        </meta:properties>
        <instances size="75">
            <instance id="0">
                <location x="0.0" y="50.0" z="0.0"/>
            </instance>
            <instance id="1">
                <location x="12.162162" y="50.0" z="0.0"/>
            </instance>
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        </instances>
    </population>
    <population name="Mossies" cell_type="MossyFiber">
        <meta:properties>

        </meta:properties>
        <instances size="12">
            <instance id="0">
                <location x="0.0" y="0.0" z="0.0"/>
            </instance>
            <instance id="1">
                <location x="81.818184" y="0.0" z="0.0"/>
            </instance>
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        </instances>
    </population>
</populations>

        <projections units="Physiological Units">
    <projection name="NetConn_Golgis_Grans" source="Golgis" target="Grans">
        <synapse_props synapse_type="GABAA" internal_delay="0.0" weight="45.0" threshold="-20.0">
        </synapse_props>
        <connections size="75">
            <connection id="0" pre_cell_id="0" pre_fraction_along="0.0" post_cell_id="0">
                <properties prop_delay="0.0" internal_delay="0.0" weight="49.038464"/>
            </connection>
            <connection id="1" pre_cell_id="0" pre_fraction_along="0.0" post_cell_id="1">
                <properties prop_delay="0.0" internal_delay="0.0" weight="43.6328"/>
            </connection>
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        </connections>
    </projection>
    <projection name="NetConn_Mossies_Grans" source="Mossies" target="Grans">
        <synapse_props synapse_type="MF_AMPA" internal_delay="0.0" weight="6.0" threshold="-20.0">
        </synapse_props>
        <synapse_props synapse_type="NMDA" internal_delay="0.0" weight="4.0" threshold="-20.0">
        </synapse_props>
        <connections size="300">
            <connection id="0" pre_cell_id="4" post_cell_id="0">
                <properties synapse_type="MF_AMPA" prop_delay="0.0" internal_delay="0.0" weight="5.1938844"/>
                <properties synapse_type="NMDA" prop_delay="0.0" internal_delay="0.0" weight="4.5408554"/>
            </connection>
            <connection id="1" pre_cell_id="3" post_cell_id="0">
                <properties synapse_type="MF_AMPA" prop_delay="0.0" internal_delay="0.0" weight="5.382913"/>
                <properties synapse_type="NMDA" prop_delay="0.0" internal_delay="0.0" weight="4.2475834"/>
            </connection>
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        </connections>
    </projection>
    <projection name="NetConn_Grans_Golgis" source="Grans" target="Golgis">
        <synapse_props synapse_type="AMPA_GranGol" internal_delay="0.0" weight="0.6" threshold="-20.0">
        </synapse_props>
        <connections size="300">
            <connection id="0" pre_cell_id="0" post_cell_id="0">
                <properties prop_delay="0.0" internal_delay="0.0" weight="0.5686336"/>
            </connection>
            <connection id="1" pre_cell_id="0" post_cell_id="3">
                <properties prop_delay="0.0" internal_delay="0.0" weight="0.6277373"/>
            </connection>
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        </connections>
    </projection>
</projections>

        <inputs units="Physiological Units">
    <input name="Input_0">
        <random_stim frequency="0.05" synaptic_mechanism="MFSpikeSyn"/>
        <target population="Mossies">
            <sites size="12">
                <site cell_id="0" segment_id="0" fraction_along="0.5"/>
                <site cell_id="1" segment_id="0" fraction_along="0.5"/>
                <site cell_id="2" segment_id="0" fraction_along="0.5"/>
                <site cell_id="3" segment_id="0" fraction_along="0.5"/>
                <site cell_id="4" segment_id="0" fraction_along="0.5"/>
                <site cell_id="5" segment_id="0" fraction_along="0.5"/>
                <site cell_id="6" segment_id="0" fraction_along="0.5"/>
                <site cell_id="7" segment_id="0" fraction_along="0.5"/>
                <site cell_id="8" segment_id="0" fraction_along="0.5"/>
                <site cell_id="9" segment_id="0" fraction_along="0.5"/>
                <site cell_id="10" segment_id="0" fraction_along="0.5"/>
                <site cell_id="11" segment_id="0" fraction_along="0.5"/>
            </sites>
        </target>
    </input>
</inputs>

</networkml>
