<?xml version="1.0" encoding="ISO-8859-1"?>
<neuroml xmlns="http://www.neuroml.org/schema/neuroml2" xmlns:xsi="http://www.w3.org/2001/XMLSchema-instance" xsi:schemaLocation="http://www.neuroml.org/schema/neuroml2 https://raw.github.com/NeuroML/NeuroML2/development/Schemas/NeuroML2/NeuroML_v2beta3.xsd" id="AMPA_GranGol">

    <notes>ChannelML file describing a synaptic mechanism</notes>

    <expTwoSynapse id="AMPA_GranGol" tauRise="3e-5s" tauDecay="0.5e-3s" gbase="1.137355e-9S" erev="0V">

        <notes>AMPA synaptic mechanism from Granule cells to Golgi cells</notes>
</expTwoSynapse>

</neuroml>
