<?xml version="1.0" encoding="iso-8859-1"?>
<neuroml xmlns="http://www.neuroml.org/schema/neuroml2" xmlns:xsi="http://www.w3.org/2001/XMLSchema-instance" xsi:schemaLocation="http://www.neuroml.org/schema/neuroml2 https://raw.github.com/NeuroML/NeuroML2/development/Schemas/NeuroML2/NeuroML_v2beta2.xsd" id="GABAA">

    <notes>ChannelML file describing a synaptic mechanism</notes>

    <expTwoSynapse id="GABAA" tauRise="3.1E-4s" tauDecay="0.0088333s" gbase="3.14159E-10S" erev="-0.07V">

        <notes>GABA A synaptic mechamism from Golgis to Granule cells</notes>
</expTwoSynapse>

</neuroml>
