<?xml version="1.0" encoding="UTF-8"?>
<neuroml xmlns="http://www.neuroml.org/schema/neuroml2" xmlns:xsi="http://www.w3.org/2001/XMLSchema-instance" xsi:schemaLocation="http://www.neuroml.org/schema/neuroml2  https://raw.github.com/NeuroML/NeuroML2/master/Schemas/NeuroML2/NeuroML_v2beta.xsd" id="network_GranCellLayer">

<notes>

Network structure (NeuroML 2beta) for project: GranCellLayer saved with neuroConstruct v1.6.1 on: 15:13:20, 15-Jan-13

Cell Group: GoC_3D contains 32 cells
Cell Group: MF_3D contains 96 cells
Cell Group: GrC_3D contains 600 cells

Network connection: NetConnMFGrC contains 2509 individual synaptic connections
Network connection: NetConnGoCGrC contains 600 individual synaptic connections
Network connection: NetConnGrCGoC contains 2400 individual synaptic connections

</notes>

    <network id="network_GranCellLayer">

        <extracellularProperties temperature="32.0 degC"/>

        <population id="GoC_3D" component="Golgi_98_3D" size="32">
            <instance id="0">
                <location x="89.48151" y="33.452442" z="-415.80963"/>
            </instance>
            <instance id="1">
                <location x="-185.03165" y="15.486768" z="426.1554"/>
            </instance>
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        </population>

        <population id="MF_3D" component="MossyFiber" size="96">
            <instance id="0">
                <location x="165.30917" y="14.988896" z="-169.77393"/>
            </instance>
            <instance id="1">
                <location x="60.532593" y="8.261546" z="-78.41934"/>
            </instance>
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        </population>

        <population id="GrC_3D" component="Granule_98_3D" size="600">
            <instance id="0">
                <location x="141.142" y="25.96852" z="396.13763"/>
            </instance>
            <instance id="1">
                <location x="176.93045" y="17.86057" z="-45.639343"/>
            </instance>
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        </population>

        <synapticConnection from="MF_3D[36]" to="GrC_3D[0]" synapse="MF_AMPA"/>

        <synapticConnection from="MF_3D[36]" to="GrC_3D[0]" synapse="NMDA"/>

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
        <explicitInput target="MF_3D[0]" input="Input_4"/>

        <explicitInput target="MF_3D[1]" input="Input_4"/>

        <explicitInput target="MF_3D[2]" input="Input_4"/>

        <explicitInput target="MF_3D[3]" input="Input_4"/>

        <explicitInput target="MF_3D[4]" input="Input_4"/>

        <explicitInput target="MF_3D[5]" input="Input_4"/>

        <explicitInput target="MF_3D[6]" input="Input_4"/>

        <explicitInput target="MF_3D[7]" input="Input_4"/>

        <explicitInput target="MF_3D[8]" input="Input_4"/>

        <explicitInput target="MF_3D[9]" input="Input_4"/>

        <explicitInput target="MF_3D[10]" input="Input_4"/>

        <explicitInput target="MF_3D[11]" input="Input_4"/>

        <explicitInput target="MF_3D[12]" input="Input_4"/>

        <explicitInput target="MF_3D[13]" input="Input_4"/>

        <explicitInput target="MF_3D[14]" input="Input_4"/>

        <explicitInput target="MF_3D[15]" input="Input_4"/>

        <explicitInput target="MF_3D[16]" input="Input_4"/>

        <explicitInput target="MF_3D[17]" input="Input_4"/>

        <explicitInput target="MF_3D[18]" input="Input_4"/>

        <explicitInput target="MF_3D[19]" input="Input_4"/>

        <explicitInput target="MF_3D[20]" input="Input_4"/>

        <explicitInput target="MF_3D[21]" input="Input_4"/>

        <explicitInput target="MF_3D[22]" input="Input_4"/>

        <explicitInput target="MF_3D[23]" input="Input_4"/>

        <explicitInput target="MF_3D[24]" input="Input_4"/>

        <explicitInput target="MF_3D[25]" input="Input_4"/>

        <explicitInput target="MF_3D[26]" input="Input_4"/>

        <explicitInput target="MF_3D[27]" input="Input_4"/>

        <explicitInput target="MF_3D[28]" input="Input_4"/>

        <explicitInput target="MF_3D[29]" input="Input_4"/>

        <explicitInput target="MF_3D[30]" input="Input_4"/>

        <explicitInput target="MF_3D[31]" input="Input_4"/>

        <explicitInput target="MF_3D[32]" input="Input_4"/>

        <explicitInput target="MF_3D[33]" input="Input_4"/>

        <explicitInput target="MF_3D[34]" input="Input_4"/>

        <explicitInput target="MF_3D[35]" input="Input_4"/>

        <explicitInput target="MF_3D[36]" input="Input_4"/>

        <explicitInput target="MF_3D[37]" input="Input_4"/>

        <explicitInput target="MF_3D[38]" input="Input_4"/>

        <explicitInput target="MF_3D[39]" input="Input_4"/>

        <explicitInput target="MF_3D[40]" input="Input_4"/>

        <explicitInput target="MF_3D[41]" input="Input_4"/>

        <explicitInput target="MF_3D[42]" input="Input_4"/>

        <explicitInput target="MF_3D[43]" input="Input_4"/>

        <explicitInput target="MF_3D[44]" input="Input_4"/>

        <explicitInput target="MF_3D[45]" input="Input_4"/>

        <explicitInput target="MF_3D[46]" input="Input_4"/>

        <explicitInput target="MF_3D[47]" input="Input_4"/>

        <explicitInput target="MF_3D[48]" input="Input_4"/>

        <explicitInput target="MF_3D[49]" input="Input_4"/>

        <explicitInput target="MF_3D[50]" input="Input_4"/>

        <explicitInput target="MF_3D[51]" input="Input_4"/>

        <explicitInput target="MF_3D[52]" input="Input_4"/>

        <explicitInput target="MF_3D[53]" input="Input_4"/>

        <explicitInput target="MF_3D[54]" input="Input_4"/>

        <explicitInput target="MF_3D[55]" input="Input_4"/>

        <explicitInput target="MF_3D[56]" input="Input_4"/>

        <explicitInput target="MF_3D[57]" input="Input_4"/>

        <explicitInput target="MF_3D[58]" input="Input_4"/>

        <explicitInput target="MF_3D[59]" input="Input_4"/>

        <explicitInput target="MF_3D[60]" input="Input_4"/>

        <explicitInput target="MF_3D[61]" input="Input_4"/>

        <explicitInput target="MF_3D[62]" input="Input_4"/>

        <explicitInput target="MF_3D[63]" input="Input_4"/>

        <explicitInput target="MF_3D[64]" input="Input_4"/>

        <explicitInput target="MF_3D[65]" input="Input_4"/>

        <explicitInput target="MF_3D[66]" input="Input_4"/>

        <explicitInput target="MF_3D[67]" input="Input_4"/>

        <explicitInput target="MF_3D[68]" input="Input_4"/>

        <explicitInput target="MF_3D[69]" input="Input_4"/>

        <explicitInput target="MF_3D[70]" input="Input_4"/>

        <explicitInput target="MF_3D[71]" input="Input_4"/>

        <explicitInput target="MF_3D[72]" input="Input_4"/>

        <explicitInput target="MF_3D[73]" input="Input_4"/>

        <explicitInput target="MF_3D[74]" input="Input_4"/>

        <explicitInput target="MF_3D[75]" input="Input_4"/>

        <explicitInput target="MF_3D[76]" input="Input_4"/>

        <explicitInput target="MF_3D[77]" input="Input_4"/>

        <explicitInput target="MF_3D[78]" input="Input_4"/>

        <explicitInput target="MF_3D[79]" input="Input_4"/>

        <explicitInput target="MF_3D[80]" input="Input_4"/>

        <explicitInput target="MF_3D[81]" input="Input_4"/>

        <explicitInput target="MF_3D[82]" input="Input_4"/>

        <explicitInput target="MF_3D[83]" input="Input_4"/>

        <explicitInput target="MF_3D[84]" input="Input_4"/>

        <explicitInput target="MF_3D[85]" input="Input_4"/>

        <explicitInput target="MF_3D[86]" input="Input_4"/>

        <explicitInput target="MF_3D[87]" input="Input_4"/>

        <explicitInput target="MF_3D[88]" input="Input_4"/>

        <explicitInput target="MF_3D[89]" input="Input_4"/>

        <explicitInput target="MF_3D[90]" input="Input_4"/>

        <explicitInput target="MF_3D[91]" input="Input_4"/>

        <explicitInput target="MF_3D[92]" input="Input_4"/>

        <explicitInput target="MF_3D[93]" input="Input_4"/>

        <explicitInput target="MF_3D[94]" input="Input_4"/>

        <explicitInput target="MF_3D[95]" input="Input_4"/>

    </network>

</neuroml>
