<?xml version="1.0" encoding="iso-8859-1"?>
<neuroml xmlns="http://www.neuroml.org/schema/neuroml2" xmlns:xsi="http://www.w3.org/2001/XMLSchema-instance" xsi:schemaLocation="http://www.neuroml.org/schema/neuroml2 https://raw.github.com/NeuroML/NeuroML2/development/Schemas/NeuroML2/NeuroML_v2beta2.xsd" id="Gran_KA_98">

    <notes>A channel from Maex, R and De Schutter, E. Synchronization of Golgi and Granule Cell Firing in a
    Detailed Network Model of the Cerebellar Granule Cell Layer</notes>

    <ionChannel id="Gran_KA_98" conductance="10pS" type="ionChannelHH" species="k">

        <notes>A channel from Maex, R and De Schutter, E. Synchronization of Golgi and Granule Cell Firing in a
    Detailed Network Model of the Cerebellar Granule Cell Layer</notes>

        <annotation>
            <rdf:RDF xmlns:rdf="http://www.w3.org/1999/02/22-rdf-syntax-ns#">
                <rdf:Description rdf:about="Gran_KA_98">

                    <bqmodel:isDescribedBy xmlns:bqmodel="http://biomodels.net/model-qualifiers/">
                        <rdf:Bag>
                            <rdf:li>Maex, R and De Schutter, E.
           Synchronization of Golgi and Granule Cell Firing in a Detailed Network Model of the
           cerebellar Granule Cell Layer. J Neurophysiol, Nov 1998; 80: 2521 - 2537</rdf:li>
                            <rdf:li rdf:resource="http://www.ncbi.nlm.nih.gov/entrez/query.fcgi?cmd=Retrieve&amp;db=PubMed&amp;list_uids=9819260&amp;dopt=Abstract"/>
                        </rdf:Bag>
                    </bqmodel:isDescribedBy>

                    <bqbiol:isVersionOf xmlns:bqbiol="http://biomodels.net/biology-qualifiers/">
                        <rdf:Bag>
                            <rdf:li>K channels</rdf:li>
                            <rdf:li rdf:resource="http://senselab.med.yale.edu/senselab/NeuronDB/channelGene2.htm#table3"/>
                        </rdf:Bag>
                    </bqbiol:isVersionOf>

                </rdf:Description>
            </rdf:RDF>
        </annotation>

        <gate id="m" type="gateHHtauInf" instances="3">
            <q10Settings type="q10ExpTemp" q10Factor="1" experimentalTemp="17.350264793 degC"/>
            <notes>Note: offset from ChannelML file incorporated into midpoint of rates!!</notes>
            <timeCourse type="Gran_KA_98_m_tau_tau"/>
            <steadyState type="HHSigmoidVariable" rate="1" scale="0.0198V" midpoint="-0.036699999999999997V"/>
        </gate>

        <gate id="h" type="gateHHtauInf" instances="1">
            <q10Settings type="q10ExpTemp" q10Factor="1" experimentalTemp="17.350264793 degC"/>
            <notes>Note: offset from ChannelML file incorporated into midpoint of rates!!</notes>
            <timeCourse type="Gran_KA_98_h_tau_tau"/>
            <steadyState type="HHSigmoidVariable" rate="1" scale="-0.0084V" midpoint="-0.0688V"/>
        </gate>

    </ionChannel>

    <ComponentType name="Gran_KA_98_m_tau_tau" extends="baseVoltageDepTime">
        <Constant name="TIME_SCALE" dimension="time" value="1 s"/>
        <Constant name="VOLT_SCALE" dimension="voltage" value="1 V"/>
        <Constant name="offset" dimension="voltage" value="0.010V"/>

        <Dynamics>
            <DerivedVariable name="V" dimension="none" value="(v - offset) / VOLT_SCALE"/>
            <DerivedVariable name="t" exposure="t" dimension="time" value="(0.410e-3 * ((exp (( ((V) + 0.0435) / (-0.0428))))) + 0.167e-3) * TIME_SCALE"/>
        </Dynamics>

    </ComponentType>

    <ComponentType name="Gran_KA_98_h_tau_tau" extends="baseVoltageDepTime">
        <Constant name="TIME_SCALE" dimension="time" value="1 s"/>
        <Constant name="VOLT_SCALE" dimension="voltage" value="1 V"/>
        <Constant name="offset" dimension="voltage" value="0.010V"/>

        <Dynamics>
            <DerivedVariable name="V" dimension="none" value="(v - offset) / VOLT_SCALE"/>
            <DerivedVariable name="t" exposure="t" dimension="time" value="(0.001 * (10.8 + (30 * V) + (1 / (57.9 * (exp (V * 127)) + (134e-6 * (exp (V * (-59)))))))) * TIME_SCALE"/>
        </Dynamics>

    </ComponentType>

</neuroml>
