<Lems xmlns="http://www.neuroml.org/lems/0.7.2" xmlns:xsi="http://www.w3.org/2001/XMLSchema-instance" xsi:schemaLocation="http://www.neuroml.org/lems/0.7.2  https://raw.githubusercontent.com/LEMS/LEMS/development/Schemas/LEMS/LEMS_v0.7.2.xsd">

    <Target component="sim1" reportFile="simulator.props" timesFile="time.dat"/>

        <!--Include standard NeuroML 2 ComponentType definitions-->

    <Include file="Cells.xml"/>
    <Include file="Networks.xml"/>
    <Include file="Simulation.xml"/>

        <!--Include the generated NeuroML 2 files-->

        <!--   Channel/synapse files-->
    <Include file="AMPA_GranGol.synapse.nml"/>
    <Include file="GABAA.synapse.nml"/>
    <Include file="Golgi_CaHVA_CML.channel.nml"/>
    <Include file="Golgi_CaPool_CML.nml"/>
    <Include file="Golgi_H_CML.channel.nml"/>
    <Include file="Golgi_KA_CML.channel.nml"/>
    <Include file="Golgi_KCa_CML.channel.nml"/>
    <Include file="Golgi_KDr_CML.channel.nml"/>
    <Include file="Golgi_NaF_CML.channel.nml"/>
    <Include file="GolgiPassiveCond.channel.nml"/>
    <Include file="Gran_CaHVA_98.channel.nml"/>
    <Include file="Gran_CaPool_98.nml"/>
    <Include file="Gran_H_98.channel.nml"/>
    <Include file="Gran_KA_98.channel.nml"/>
    <Include file="Gran_KCa_98.channel.nml"/>
    <Include file="Gran_KDr_98.channel.nml"/>
    <Include file="Gran_NaF_98.channel.nml"/>
    <Include file="GranPassiveCond.channel.nml"/>
    <Include file="MF_AMPA.synapse.nml"/>
    <Include file="MFFastLeakCond.channel.nml"/>
    <Include file="NMDA.synapse.nml"/>
        <!--   Cell files-->
    <Include file="Golgi_98.cell.nml"/>
    <Include file="Granule_98.cell.nml"/>
    <Include file="MossyFiber.cell.nml"/>
        <!--   Network file-->
    <Include file="GranCellLayer.net.nml"/>

        <!--Note: this could be: Simulation id="sim1" ... , but Component type="Simulation" ...
        is used to allow validation of this file according to the LEMS schema specified above...-->
    <Component type="Simulation" id="sim1" length="500.0ms" step="0.01ms" target="network_GranCellLayer">

        <Display id="Golgis_v" title="GranCellLayer: Default Simulation Configuration, Golgis, VOLTAGE, VOLTAGE, VOLTAGE, VOLTAGE" xmin="-0.05" xmax="0.55" ymin="-0.104" ymax="0.064" timeScale="1s">
            <Line id="Golgis_0 v" timeScale="1s" quantity="Golgis/0/Golgi_98/v" scale="1 V" color="#000000"/>

            <Line id="Golgis_1 v" timeScale="1s" quantity="Golgis/1/Golgi_98/v" scale="1 V" color="#ff0000"/>

            <Line id="Golgis_2 v" timeScale="1s" quantity="Golgis/2/Golgi_98/v" scale="1 V" color="#0000ff"/>

            <Line id="Golgis_3 v" timeScale="1s" quantity="Golgis/3/Golgi_98/v" scale="1 V" color="#009b00"/>
        </Display>

        <Display id="GraphWin_0" title="GranCellLayer: Default Simulation Configuration, Grans, VOLTAGE, VOLTAGE, VOLTAGE, VOLTAGE, VOLTAGE, VOLTAGE, VOLTAGE, VOLTAGE, VOLTAGE" xmin="-0.05" xmax="0.55" ymin="-0.104" ymax="0.064" timeScale="1s">
            <Line id="Grans_59 v" timeScale="1s" quantity="Grans/59/Granule_98/v" scale="1 V" color="#000000"/>

            <Line id="Grans_45 v" timeScale="1s" quantity="Grans/45/Granule_98/v" scale="1 V" color="#ff0000"/>

            <Line id="Grans_2 v" timeScale="1s" quantity="Grans/2/Granule_98/v" scale="1 V" color="#0000ff"/>

            <Line id="Grans_71 v" timeScale="1s" quantity="Grans/71/Granule_98/v" scale="1 V" color="#009b00"/>

            <Line id="Grans_41 v" timeScale="1s" quantity="Grans/41/Granule_98/v" scale="1 V" color="#ffc800"/>

            <Line id="Grans_28 v" timeScale="1s" quantity="Grans/28/Granule_98/v" scale="1 V" color="#8c6400"/>

            <Line id="Grans_21 v" timeScale="1s" quantity="Grans/21/Granule_98/v" scale="1 V" color="#ff00ff"/>

            <Line id="Grans_13 v" timeScale="1s" quantity="Grans/13/Granule_98/v" scale="1 V" color="#ffff00"/>

            <Line id="Grans_27 v" timeScale="1s" quantity="Grans/27/Granule_98/v" scale="1 V" color="#808080"/>
        </Display>

        <OutputFile id="Golgis_v_0_0_OF" fileName="Golgis_0.0.dat">
            <OutputColumn id="v" quantity="Golgis/0/Golgi_98/v"/>
        </OutputFile>

        <OutputFile id="Golgis_v_1_0_OF" fileName="Golgis_1.0.dat">
            <OutputColumn id="v" quantity="Golgis/1/Golgi_98/v"/>
        </OutputFile>

        <OutputFile id="Golgis_v_2_0_OF" fileName="Golgis_2.0.dat">
            <OutputColumn id="v" quantity="Golgis/2/Golgi_98/v"/>
        </OutputFile>

        <OutputFile id="Golgis_v_3_0_OF" fileName="Golgis_3.0.dat">
            <OutputColumn id="v" quantity="Golgis/3/Golgi_98/v"/>
        </OutputFile>

    </Component>

</Lems>
