<?xml version="1.0" encoding="UTF-8"?>
<neuroml xmlns="http://www.neuroml.org/schema/neuroml2" xmlns:xsi="http://www.w3.org/2001/XMLSchema-instance" xsi:schemaLocation="http://www.neuroml.org/schema/neuroml2  https://raw.github.com/NeuroML/NeuroML2/development/Schemas/NeuroML2/NeuroML_v2beta3.xsd" id="network_GranCellLayer">

    <notes>

Network structure (NeuroML 2beta3) for project: GranCellLayer saved with neuroConstruct v1.7.1 on: 18:15:30, 10-Jun-14

Cell Group: GoC_3D contains 32 cells
Cell Group: MF_3D contains 96 cells
Cell Group: GrC_3D contains 600 cells

Network connection: NetConnMFGrC contains 2499 individual synaptic connections
Network connection: NetConnGoCGrC contains 600 individual synaptic connections
Network connection: NetConnGrCGoC contains 2400 individual synaptic connections

    </notes>

    <include href="AMPA_GranGol.synapse.nml"/>
    <include href="GABAA.synapse.nml"/>
    <include href="Golgi_98_3D.cell.nml"/>
    <include href="Golgi_CaHVA_CML.channel.nml"/>
    <include href="Golgi_CaPool_CML.nml"/>
    <include href="Golgi_H_CML.channel.nml"/>
    <include href="Golgi_KA_CML.channel.nml"/>
    <include href="Golgi_KCa_CML.channel.nml"/>
    <include href="Golgi_KDr_CML.channel.nml"/>
    <include href="Golgi_NaF_CML.channel.nml"/>
    <include href="GolgiPassiveCond.channel.nml"/>
    <include href="Gran_CaHVA_98.channel.nml"/>
    <include href="Gran_CaPool_98.nml"/>
    <include href="Gran_H_98.channel.nml"/>
    <include href="Gran_KA_98.channel.nml"/>
    <include href="Gran_KCa_98.channel.nml"/>
    <include href="Gran_KDr_98.channel.nml"/>
    <include href="Gran_NaF_98.channel.nml"/>
    <include href="GranPassiveCond.channel.nml"/>
    <include href="Granule_98_3D.cell.nml"/>
    <include href="MF_AMPA.synapse.nml"/>
    <include href="MFFastLeakCond.channel.nml"/>
    <include href="MossyFiber.cell.nml"/>
    <include href="NMDA.synapse.nml"/>

    <spikeGeneratorPoisson id="Input_4" averageRate="50.0 per_ms"/>

    <network id="network_GranCellLayer" type="networkWithTemperature" temperature="32.0 degC">

        <population id="GoC_3D" component="Golgi_98_3D" type="populationList" size="32">
            <instance id="0">
                <location x="71.674805" y="26.038176" z="460.7572"/>
            </instance>
            <instance id="1">
                <location x="198.58377" y="20.78619" z="-167.54431"/>
            </instance>
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        </population>

        <population id="MF_3D" component="MossyFiber" type="populationList" size="96">
            <instance id="0">
                <location x="214.55362" y="29.933235" z="419.70355"/>
            </instance>
            <instance id="1">
                <location x="167.13159" y="8.806377" z="490.07617"/>
            </instance>
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        </population>

        <population id="GrC_3D" component="Granule_98_3D" type="populationList" size="600">
            <instance id="0">
                <location x="-50.473724" y="33.64719" z="-236.30112"/>
            </instance>
            <instance id="1">
                <location x="-208.45738" y="30.635012" z="-103.615295"/>
            </instance>
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        </population>

        <population id="Input_4_population" component="Input_4" size="96"/>    <projection id="NetConnMFGrC" presynapticPopulation="MF_3D" postsynapticPopulation="GrC_3D" synapse="MF_AMPA">
            <connection id="0" preCellId="../MF_3D/94/MossyFiber" postCellId="../GrC_3D/0/Granule_98_3D" preSegmentId="0" preFractionAlong="0.0" postSegmentId="0" postFractionAlong="0.5"/>
            <connection id="1" preCellId="../MF_3D/43/MossyFiber" postCellId="../GrC_3D/0/Granule_98_3D" preSegmentId="0" preFractionAlong="0.0" postSegmentId="0" postFractionAlong="0.5"/>
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        </projection>

        <projection id="NetConnGoCGrC" presynapticPopulation="GoC_3D" postsynapticPopulation="GrC_3D" synapse="GABAA">
            <connection id="0" preCellId="../GoC_3D/28/Golgi_98_3D" postCellId="../GrC_3D/0/Granule_98_3D" preSegmentId="0" preFractionAlong="0.5" postSegmentId="0" postFractionAlong="0.5"/>
            <connection id="1" preCellId="../GoC_3D/11/Golgi_98_3D" postCellId="../GrC_3D/1/Granule_98_3D" preSegmentId="0" preFractionAlong="0.5" postSegmentId="0" postFractionAlong="0.5"/>
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        </projection>

        <projection id="Input_4_projection">
    <connection id="0"/>

    <connection id="1"/>

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    </projection>    <projection id="NetConnGrCGoC" presynapticPopulation="GrC_3D" postsynapticPopulation="GoC_3D" synapse="AMPA_GranGol">
            <connection id="0" preCellId="../GrC_3D/0/Granule_98_3D" postCellId="../GoC_3D/28/Golgi_98_3D" preSegmentId="2" preFractionAlong="0.30014837" postSegmentId="3" postFractionAlong="0.553883"/>
            <connection id="1" preCellId="../GrC_3D/0/Granule_98_3D" postCellId="../GoC_3D/8/Golgi_98_3D" preSegmentId="2" preFractionAlong="0.0205127" postSegmentId="3" postFractionAlong="0.032733917"/>
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        </projection>

    </network>

</neuroml>
